// COMSOL Multiphysics 4.2a (Build: 110) model "Study of B field 3.mph"
// Wireless power: Litz plus a secondary disc.
// Outline of the model tree

Selections
  sel1: Explicit "Transmitter Coil" on edges 6, 7, 21, 27
  sel2: Explicit "Receiver Coil" on edges 9, 10, 33, 37
  sel3: Explicit "Transmission Disk" on boundaries 9

Geometry
  geom1 "Geometry 1" (3D, length unit cm)
    wp1: WorkPlane | quickplane = zx; quicky = -40
      c1: Circle | pos = {0, 0}; type = curve; r = 3.5
      c2: Circle | type = curve; layer = 0.3; r = 3.5
      c3: Circle | type = solid; r = 3
      uni1: Union | input = c1, c2
    mir1: Mirror | input = wp1.uni1
    mov2: Move
      input = mir1(1)
      keep = on
      disply = 80
      objSelection: selection geom1_mov2_pnt
      objSelection: selection geom1_mov2_edg
      objSelection: selection geom1_mov2_bnd
      objSelection: selection geom1_mov2_dom
    sph1: Sphere | pos = {0, 0, 0}; ax3 = {0, 0, 10}; r = 80
    fin: Finalize "Form Union"

Materials
  mat1 "Air" on all domains
    def "Basic"
      density = rho(pA,T)
      heatcapacity = Cp(T)
      soundspeed = cs(T)
      ratioofspecificheat = 1.4
      relpermeability = 1
      relpermittivity = 1
      electricconductivity = 0
      thermalconductivity = k(T)
      dynamicviscosity = eta(T)
      eta: Piecewise | arg = T; extrap = constant; pieces = {200.0, 1600.0, -8.38278E-7+8.35717342E-8*T^1-7.69429583E-11*T^2+4.6437266E-14*T^3-1.06585607E-17*T^4}
      Cp: Piecewise | arg = T; extrap = constant; pieces = {200.0, 1600.0, 1047.63657-0.372589265*T^1+9.45304214E-4*T^2-6.02409443E-7*T^3+1.2858961E-10*T^4}
      k: Piecewise | arg = T; extrap = constant; pieces = {200.0, 1600.0, -0.00227583562+1.15480022E-4*T^1-7.90252856E-8*T^2+4.11702505E-11*T^3-7.43864331E-15*T^4}
      rho: Analytic | expr = pA*0.02897/8.314/T; args = {pA, T}; dermethod = manual; argders = {{pA, d(pA*0.02897/8.314/T,pA)}, {T, d(pA*0.02897/8.314/T,T)}}
      cs: Analytic | expr = sqrt(1.4*287*T); args = T; dermethod = manual; argders = {T, d(sqrt(1.4*287*T),T)}
  mat2 "Copper" on edges 6, 7, 9-14, 21, 22, 26, 27, 33, 34, 36, 37
    def "Basic"
      relpermeability = 1
      electricconductivity = 5.998e7[S/m]
      thermalexpansioncoefficient = 17e-6[1/K]
      heatcapacity = 385[J/(kg*K)]
      relpermittivity = 1
      density = 8700[kg/m^3]
      thermalconductivity = 400[W/(m*K)]
    Enu "Young's modulus and Poisson's ratio"
      youngsmodulus = 110e9[Pa]
      poissonsratio = 0.35
    linzRes "Linearized resistivity"
      rho0 = 1.72e-8[ohm*m]
      alpha = 0.0039[1/K]
      Tref = 298[K]

Physics
  mf: InductionCurrents "Magnetic Fields" on all domains
    dependent variable A = {Ax, Ay, Az}
    al1: AmperesLaw "Ampère's Law 1" (default) | sigma_mat = from_mat; mur_mat = from_mat
    mi1: MagneticInsulation (default)
    init1: init "Initial Values 1" (default)
    edc1: EdgeCurrent on selection sel1 | Ie = 1
    edc3: EdgeCurrent (disabled) on edges 12, 15, 23, 26 | Ie = 1
    mpd1: MagneticPointDipole (disabled) on no points

Mesh
  mesh1 "Main Mesh" (physics-controlled)
    size: MeshSizeDefault | hauto = 4

Studies
  std1 "Study 1"
    stat1: Stationary
  std2 "Study 2"
    freq: Frequency "Frequency Domain"

Solver configurations
  sol1 "Solver Sequence 1" (study std1)
    v1: Variables
    s1: Stationary | stol = 5.1010
      fc1: FullyCoupled | linsolver = i1
      i1: Iterative | linsolver = fgmres
        mg1: Multigrid
  sol2 "Solver 2" (study std2)
    v1: Variables "Dependent Variables 1"
    s1: Stationary "Stationary Solver 1"
      p1: Parametric | pname = freq
      fc1: FullyCoupled | linsolver = i1
      i1: Iterative | linsolver = bicgstab
        mg1: Multigrid
      prob1: SolverProblem "Problems 1"
        error1: SolverError "Error 1"

Datasets
  dset1: Solution | solution = sol1
  dset2: Solution | solution = sol2

Derived values
  int1: IntLine "Line Integration Tx" on all edges | data = dset1; table = tbl1; expr = tAx*t1x+tAy*t1y+tAz*t1z
  int2: IntLine "Line Integration Rx" | data = dset1; table = tbl3; expr = tAx*t1x+tAy*t1y+tAz*t1z

Tables
  tbl1: Table
    // Line Integration 1 (tAx*t1x+tAy*t1y+tAz*t1z)
    tAx*t1x+tAy*t1y+tAz*t1z (Wb)
    2.8561e-07
  tbl2: Table
    // Line Integration 2 (mf.normB)
    Magnetic flux density norm (Wb/m) | Magnetic flux density, x component (Wb/m) | tAx*t1x+tAy*t1y+tAz*t1z (Wb)
    0.000144099 | -7.25286e-06 | -2.8174e-07
  tbl3: Table
    // Line Integration 2 (tAx*t1x+tAy*t1y+tAz*t1z)
    tAx*t1x+tAy*t1y+tAz*t1z (Wb)
    -2.8174e-07

Plots
  pg1: PlotGroup3D "3D Plot Group 1" (disabled) | data = dset1
    surf1: Surface | expr = mf.normB
  pg2: PlotGroup3D "3D Plot Group 2" | data = dset1
    slc1: Slice
      expr = log10(mod1.mf.normB)
      quickplane = zx
      quickynumber = 2
      quickznumber = 1
      genpoints = {{0, 0, 0}, {1, 0, 0}, {0, 1, 0}}
      shift = -0.4
    str1: Streamline | expr = {mf.Hx, mf.Hy, mf.Hz}; normal = on
    slc2: Slice (disabled) | expr = log10(mod1.mf.normB); genpoints = {{0, 0, 0}, {1, 0, 0}, {0, 1, 0}}
    vol1: Volume (disabled) | expr = log10(mod1.mf.normB)
    surf1: Surface (disabled) | expr = log10(mod1.mf.normB)
    str2: Streamline (disabled) | expr = {mf.Bx, mf.By, mf.Bz}
  pg3: PlotGroup3D "Magnetic Flux Density (mf)" | data = dset2
    mslc1: Multislice | expr = mf.normB

Exports
  img1: Image3D "Output Image"
    width = 1200
    pngfilename = C:\aeonWorkingDirectory\bph\calculators\thesis\AntennaCatalog\Models\images\E--Single loop with disk to single loop real.png
  anim1: Animation
    movietype = avi
    avifilename = C:\Users\ctucker\aeonProjectDirectory\Monkey-Man\thesis\fields\projects\inductive link\v40a\figures\inductive_axialAlignment_movie.avi
    sweeptype = solutions
    staticframes = 48