// COMSOL Multiphysics 4.2a (Build: 110) model "Loop radiator.mph"
// Wireless power: Litz plus a secondary disc.
// Outline of the model tree

Selections
  sel1: Explicit "Transmitter Coil" on no edges
  sel2: Explicit "Receiver Coil" on no edges
  sel3: Explicit "Transmission Disk" on no boundaries
  sel4: Explicit "Disc and distant" on no boundaries
  sel5: Explicit "Tx and disc - all edges" on no edges

Geometry
  geom1 "Geometry 1" (3D, length unit cm)
    wp1: WorkPlane | quickplane = zx; quicky = 0; workplane3d = on
      c1: Circle | pos = {0, 0}; type = curve; layername = Layer 1; layer = 0.12; r = 3.0
      c2: Circle (disabled) | type = curve; layer = 0.3; r = 3.5
      c3: Circle "Disk" (disabled) | type = solid; r = 3.5
    wp2: WorkPlane
    sph1: Sphere | pos = {0, 0, 0}; ax3 = {0, 0, 10}; r = 50
    ext1: Extrude | workplane = wp1; input = wp1; distance = 0.12
    fin: Finalize "Form Union"

Materials
  mat1 "Air" on domains 1
    def "Basic"
      relpermeability = 1
      relpermittivity = 1
      dynamicviscosity = eta(T[1/K])[Pa*s]
      ratioofspecificheat = 1.4
      electricconductivity = 0[S/m]
      heatcapacity = Cp(T[1/K])[J/(kg*K)]
      density = rho(pA[1/Pa],T[1/K])[kg/m^3]
      thermalconductivity = k(T[1/K])[W/(m*K)]
      soundspeed = cs(T[1/K])[m/s]
      eta: Piecewise | arg = T; extrap = constant; pieces = {200.0, 1600.0, -8.38278E-7+8.35717342E-8*T^1-7.69429583E-11*T^2+4.6437266E-14*T^3-1.06585607E-17*T^4}
      Cp: Piecewise | arg = T; extrap = constant; pieces = {200.0, 1600.0, 1047.63657-0.372589265*T^1+9.45304214E-4*T^2-6.02409443E-7*T^3+1.2858961E-10*T^4}
      rho: Analytic | expr = pA*0.02897/8.314/T; args = {pA, T}; dermethod = manual; argders = {{pA, d(pA*0.02897/8.314/T,pA)}, {T, d(pA*0.02897/8.314/T,T)}}
      k: Piecewise | arg = T; extrap = constant; pieces = {200.0, 1600.0, -0.00227583562+1.15480022E-4*T^1-7.90252856E-8*T^2+4.11702505E-11*T^3-7.43864331E-15*T^4}
      cs: Analytic | expr = sqrt(1.4*287*T); args = T; dermethod = manual; argders = {T, d(sqrt(1.4*287*T),T)}
  mat2 "Copper" on domains 2-5
    def "Basic"
      relpermeability = 1
      electricconductivity = 5.998e7[S/m]
      heatcapacity = 385[J/(kg*K)]
      relpermittivity = 1
      emissivity = 0.5
      density = 8700[kg/m^3]
      thermalconductivity = 400[W/(m*K)]
    linzRes "Linearized resistivity"
      rho0 = 1.72e-8[ohm*m]
      alpha = 3.9e-3[1/K]
      Tref = 273.15[K]

Physics
  mef: ElectricInductionCurrents "Magnetic and Electric Fields" on domains 2-5
    dependent variable V
    alc1: ElectromagneticModel "Ampère's Law and Current Conservation 1" (default)
    mi1: MagneticInsulation (default)
      ein1: ElectricInsulation (default)
    init1: init "Initial Values 1" (default)

Mesh
  mesh1 "Main Mesh" (physics-controlled)
    size: MeshSizeDefault | hauto = 4

Studies
  std1 "Study 1"
    stat1: Stationary
  std2 "Study 2"
    stat: Stationary
    frlin: Frequencylinearized "Frequency-Domain, Perturbation"

Solver configurations
  sol1 "Solver Sequence 1" (study std1)
    v1: Variables
    s1: Stationary | stol = 5.1010
      fc1: FullyCoupled | linsolver = i1
      i1: Iterative | linsolver = fgmres
        mg1: Multigrid
  sol2 "Solver 2" (study std2)
    v1: Variables "Dependent Variables 1"
    s1: Stationary "Stationary Solver 1"
      fc1: FullyCoupled | linsolver = i1
      i1: Iterative | linsolver = fgmres
        mg1: Multigrid
    su1: StoreSolution
    v2: Variables "Dependent Variables 2" | initmethod = sol; notsolmethod = sol
    s2: Stationary "Stationary Solver 2" | nonlin = linper; linpmethod = sol; storelinpoint = on
      p1: Parametric | pname = freq
      fc1: FullyCoupled | linsolver = i1
      i1: Iterative | linsolver = fgmres
        mg1: Multigrid
      prob1: SolverProblem "Problems 1"
        error1: SolverError "Error 1"
  sol3 "Store Solution 3" (study std2)

Datasets
  dset1: Solution | solution = sol1
  dset2: Solution | solution = sol2
  dset3: Solution | solution = sol3

Derived values
  int1: IntLine "Line Integration Tx" on all edges | data = dset1; table = tbl1; expr = tAx*t1x+tAy*t1y+tAz*t1z
  int2: IntLine "Line Integration Rx" | data = dset1; table = tbl3; expr = tAx*t1x+tAy*t1y+tAz*t1z

Tables
  tbl1: Table
    // Line Integration 1 (tAx*t1x+tAy*t1y+tAz*t1z)
    tAx*t1x+tAy*t1y+tAz*t1z (Wb)
    2.8561e-07
  tbl2: Table
    // Line Integration 2 (mf.normB)
    Magnetic flux density norm (Wb/m) | Magnetic flux density, x component (Wb/m) | tAx*t1x+tAy*t1y+tAz*t1z (Wb)
    0.000144099 | -7.25286e-06 | -2.8174e-07
  tbl3: Table
    // Line Integration 2 (tAx*t1x+tAy*t1y+tAz*t1z)
    tAx*t1x+tAy*t1y+tAz*t1z (Wb)
    -2.8174e-07

Plots
  pg1: PlotGroup3D "3D Plot Group 1" | data = dset1
    surf1: Surface (disabled) | expr = mf.normB
    slc1: Slice (disabled)
      expr = mf.normB
      quickplane = zx
      quickxnumber = 2
      quickynumber = 2
      genpoints = {{0, 0, 0}, {1, 0, 0}, {0, 1, 0}}
    iso1: Isosurface (disabled) | expr = mf.normB
    con1: Contour (disabled) | expr = mf.normB
    str1: Streamline on boundaries 7, 8, 16, 17 | expr = {mf.Bx, mf.By, mf.Bz}
    str2: Streamline (disabled) | expr = {mf.Bx, mf.By, mf.Bz}
    str3: Streamline (disabled) | expr = {mf.Hx, mf.Hy, mf.Hz}
  pg2: PlotGroup3D "3D Plot Group 2" (disabled) | data = dset1
    slc1: Slice
      expr = log10(mod1.mf.normB)
      quickplane = zx
      quickynumber = 2
      quickznumber = 1
      genpoints = {{0, 0, 0}, {1, 0, 0}, {0, 1, 0}}
      shift = -0.4
    str1: Streamline | expr = {mf.Hx, mf.Hy, mf.Hz}; normal = on
    slc2: Slice (disabled) | expr = log10(mod1.mf.normB); genpoints = {{0, 0, 0}, {1, 0, 0}, {0, 1, 0}}
    vol1: Volume (disabled) | expr = log10(mod1.mf.normB)
    surf1: Surface (disabled) | expr = log10(mod1.mf.normB)
    str2: Streamline (disabled) | expr = {mf.Bx, mf.By, mf.Bz}
  pg3: PlotGroup3D "Magnetic Flux Density (mef)" | data = dset2
    mslc1: Multislice | expr = mef.normB

Exports
  img1: Image3D "Output Image"
    width = 1200
    pngfilename = C:\aeonWorkingDirectory\bph\calculators\thesis\AntennaCatalog\Models\images\E--Single loop with disk to single loop real.png
  anim1: Animation
    movietype = avi
    avifilename = C:\Users\ctucker\aeonProjectDirectory\Monkey-Man\thesis\fields\projects\inductive link\v40a\figures\inductive_axialAlignment_movie.avi
    sweeptype = solutions
    staticframes = 48