// COMSOL Multiphysics 4.2a (Build: 110) model "Loop radiator.mph"
// Outline of the model tree

Geometry
  geom1 "Geometry 1" (3D, length unit cm)
    tor1: Torus "Loop coil" | rmaj = 3; rmin = 0.12
    fin: Finalize "Form Union"

Materials
  mat1 "Copper" on all domains
    def "Basic"
      relpermeability = 1
      electricconductivity = 5.998e7[S/m]
      heatcapacity = 385[J/(kg*K)]
      relpermittivity = 1
      emissivity = 0.5
      density = 8700[kg/m^3]
      thermalconductivity = 400[W/(m*K)]
    linzRes "Linearized resistivity"
      rho0 = 1.72e-8[ohm*m]
      alpha = 3.9e-3[1/K]
      Tref = 273.15[K]

Physics
  mf: InductionCurrents "Magnetic Fields" on no domains
    dependent variable A = {Ax, Ay, Az}
    al1: AmperesLaw "Ampère's Law 1" (default)
    mi1: MagneticInsulation (default)
    init1: init "Initial Values 1" (default)

Mesh
  mesh1 "Mesh 1" (physics-controlled)
    size: MeshSizeDefault | hauto = 4

Studies
  std1 "Study 1"
    stat: Stationary

Solver configurations
  sol1 "Solver 1" (study std1)
    v1: Variables "Dependent Variables 1"
    s1: Stationary "Stationary Solver 1"
      fc1: FullyCoupled | linsolver = i1
      i1: Iterative | linsolver = fgmres
        mg1: Multigrid

Datasets
  dset1: Solution | solution = sol1

Plots
  pg1: PlotGroup3D "Magnetic Flux Density (mf)" | data = dset1
    mslc1: Multislice | expr = mf.normB